! BOXCULVERT_V0_CLEAR

FINISH

/uis,MSGPOP,3

ALLSEL

/prep7
VCLEAR,ALL
ACLEAR,ALL
LCLEAR,ALL
KCLEAR,ALL
EDELE,ALL
NDELE,ALL
VDELE,ALL,,,1
ADELE,ALL,,,1
LDELE,ALL,,,1
KDELE,ALL
ETDELE,ALL
MPDELE,ALL,ALL
TBDELE,ALL,ALL

/uis,MSGPOP,2
